// SBML level 3 version 1

model main()
  // model units - substance: mole, time: second, extent: mole

  // Compartments:
  compartment c1 = 1 litre;

  // Species:
  species Inde in c1 = 1/c1;
  species Indi in c1 = 0;
  species Ind in c1 = 1/c1;
  species mRNA1 in c1 = 0;
  species Pep1 in c1 = 0;
  species mRNA2 in c1 = 0;
  species Pep2 in c1 = 0;
  species mRNA3 in c1 = 0;
  species Pep3 in c1 = 0;

  // Parameters:
  syn_mRNA1 = 4.612336e-7 molperLmin;
  syn_mRNA2 = 1.144915e-6 molperLmin;
  syn_mRNA3 = 1.227336e-7 molperLmin;
  deg_mRNA = 0.1357 per_min;
  syn_Pep = 0.007037876 molperLmin;
  deg_Pep = 0.002501058 per_min;
  Pepmax = 7.066333e-7 molperL;
  Km = 0.07100994 molperL;
  deg_Ind = 0.003146214 per_min;
  Ratio = 0.1539657 Dimension_less;
  state1 = 0 Dimension_less;
  state2 = 0 Dimension_less;

  // Rate rules:
  Inde' = -(Inde/(Inde + Km))*Inde;
  Indi' = Inde/(Inde + Km)*Inde;
  Ind' = -deg_Ind*Ind;
  mRNA1' = syn_mRNA1*Indi*state1 - deg_mRNA*mRNA1;
  Pep1' = syn_Pep*mRNA1 - deg_Pep*Pep1;
  mRNA2' = syn_mRNA2*Ind*state2 - deg_mRNA*mRNA2;
  Pep2' = syn_Pep*mRNA2 - deg_Pep*Pep2;
  mRNA3' = syn_mRNA3*((Pep1 + Pep2)/Pepmax) - deg_mRNA*mRNA3;
  Pep3' = syn_Pep*(1 - state1*state2*Ratio)*mRNA3 - deg_Pep*Pep3;

  // Unit definitions:
  unit per_second = 1 / second;
  unit per_min = 1 / (60 second);
  unit minute = 60 second;
  unit seconds = second;
  unit molperLmin = mole / (litre * 60 second);
  unit molpermin = 1 / (60 second);
  unit molperL = mole / litre;
  unit mol = mole;
  unit Dimension_less = dimensionless;
  unit items = item;
  unit itemspermol = item / mole;
end
