// SBML level 3 version 1

model main()
  // model units - substance: mole, time: second, extent: mole

  // Compartments:
  compartment c1 = 1 litre;

  // Species:
  species rmt in c1 = 0;
  species rmm in c1 = 0;
  species rmq in c1 = 0;
  species rmr in c1 = 0;
  species rmp in c1 = 0;
  species pt in c1 = 1/c1;
  species pm in c1 = 0;
  species mt in c1 = 0;
  species mm in c1 = 0;
  species mq in c1 = 0;
  species mr in c1 = 0;
  species mp in c1 = 0;
  species si in c1 = 0;
  species a in c1 = 1000/c1;
  species q in c1 = 0;
  species r in c1 = 10/c1;
  species p in c1 = 0;
  species N in c1 = 1/c1;
  species s0 in c1 = 10000000000/c1;

  // Parameters:
  M = 100000000 items;
  gmax = 1260 itemspermol;
  Kgamma = 300000000 mol;
  thetat = 4.3797 mol;
  thetam = 4.3797 mol;
  thetaq = 4.3797 mol;
  thetar = 426.869 mol;
  thetap = 4.3797 mol;
  wt = 4.139 molpermin;
  wm = 4.139 molpermin;
  wq = 948.9349 molpermin;
  wr = 929.9678 molpermin;
  wp = 0 molpermin;
  nt = 300 items;
  nm = 300 items;
  nq = 300 items;
  nr = 7549 items;
  np_ = 300 items;
  hq = 4 Dimension_less;
  Kt = 1000 mol;
  vt = 726 per_min;
  Kq = 152200 mol;
  vm = 5800 per_min;
  Km = 1000 mol;
  ns = 100 Dimension_less;
  dm = 0.1 per_min;
  kb = 1 per_min;
  ku = 1 per_min;
  RegN = 0 Dimension_less;
  Regs0 = 0 Dimension_less;
  gamma has itemspermol;
  ttrate has itemspermol;
  lam has mol;
  nucat has mol;

  // Assignment rules:
  gamma := gmax*a/(Kgamma + a);
  ttrate := (rmq + rmr + rmp + rmt + rmm)*gamma;
  lam := ttrate/M;
  nucat := pm*vm*si/(Km + si);

  // Rate rules:
  rmt' = kb*r*mt - ku*rmt - gamma/nt*rmt - lam*rmt;
  rmm' = kb*r*mm - ku*rmm - gamma/nm*rmm - lam*rmm;
  rmq' = kb*r*mq - ku*rmq - gamma/nq*rmq - lam*rmq;
  rmr' = kb*r*mr - ku*rmr - gamma/nr*rmr - lam*rmr;
  rmp' = kb*r*mp - ku*rmp - gamma/np_*rmp - lam*rmp;
  pt' = gamma/nt*rmt - lam*pt;
  pm' = gamma/nm*rmm - lam*pm;
  mt' = wt*a/(thetat + a) + ku*rmt + gamma/nt*rmt - kb*r*mt - dm*mt - lam*mt;
  mm' = wm*a/(thetam + a) + ku*rmm + gamma/nm*rmm - kb*r*mm - dm*mm - lam*mm;
  mq' = wq*a/(thetaq + a)/(1 + (q/Kq)^hq) + ku*rmq + gamma/nq*rmq - kb*r*mq - dm*mq - lam*mq;
  mr' = wr*a/(thetar + a) + ku*rmr + gamma/nr*rmr - kb*r*mr - dm*mr - lam*mr;
  mp' = wp*a/(thetap + a) + ku*rmp + gamma/np_*rmp - kb*r*mp - dm*mp - lam*mp;
  si' = pt*vt*(s0/(Kt + s0)) - nucat - lam*si;
  a' = ns*nucat - ttrate - lam*a;
  q' = gamma/nq*rmq - lam*q;
  r' = ku*rmr + ku*rmt + ku*rmm + ku*rmp + ku*rmq + gamma/nr*rmr + gamma/nr*rmr + gamma/nt*rmt + gamma/nm*rmm + gamma/np_*rmp + gamma/nq*rmq - kb*r*mr - kb*r*mt - kb*r*mm - kb*r*mp - kb*r*mq - lam*r;
  p' = gamma/np_*rmp - lam*p;
  N' = RegN*lam*N;
  s0' = Regs0*(-(pt*vt*(s0/(Kt + s0))*N));

  // Unit definitions:
  unit per_second = 1 / second;
  unit per_min = 1 / (60 second);
  unit minute = 60 second;
  unit seconds = second;
  unit molperLmin = mole / (litre * 60 second);
  unit molpermin = 1 / (60 second);
  unit molperL = mole / litre;
  unit mol = mole;
  unit Dimension_less = dimensionless;
  unit items = item;
  unit itemspermol = item / mole;
end
