// SBML level 3 version 1

model main()
  // model units - substance: mole, time: second, extent: mole

  // Compartments:
  compartment c1 = 1 litre;

  // Species:
  species Inde1 in c1 = 0;
  species Indi1 in c1 = 0;
  species Inde2 in c1 = 0;
  species Indi2 in c1 = 0;
  species mRNA1 in c1 = 0;
  species Pep1 in c1 = 0;
  species mRNA2 in c1 = 0;
  species Pep2 in c1 = 0;
  species mRNA3 in c1 = 0;
  species Pep3 in c1 = 0;

  // Parameters:
  syn_mRNA1 = 2.53e-6 molperLmin;
  syn_mRNA2 = 2.53e-6 molperLmin;
  syn_mRNA3 = 2.53e-6 molperLmin;
  deg_mRNA = 0.1386 per_min;
  syn_Pep = 0.01 per_min;
  deg_Pep = 0.0105 per_min;
  Pepmax = 2.53e-6 molperL;
  Km1 = 35 Dimension_less;
  Km2 = 35 Dimension_less;
  state1 = 0 Dimension_less;
  state2 = 0 Dimension_less;

  // Rate rules:
  Inde1' = -(Inde1/(Inde1 + Km1))*Inde1;
  Indi1' = Inde1/(Inde1 + Km1)*Inde1;
  Inde2' = -(Inde2/(Inde2 + Km2))*Inde2;
  Indi2' = Inde2/(Inde2 + Km2)*Inde2;
  mRNA1' = syn_mRNA1*Indi1*state1 - deg_mRNA*mRNA1;
  Pep1' = syn_Pep*mRNA1 - deg_Pep*Pep1;
  mRNA2' = syn_mRNA2*Indi2*state2 - deg_mRNA*mRNA2;
  Pep2' = syn_Pep*mRNA2 - deg_Pep*Pep2;
  mRNA3' = syn_mRNA3*((Pep1 + Pep2)/Pepmax) - deg_mRNA*mRNA3;
  Pep3' = syn_Pep*mRNA3 - deg_Pep*Pep3;

  // Unit definitions:
  unit per_second = 1 / second;
  unit per_min = 1 / (60 second);
  unit minute = 60 second;
  unit seconds = second;
  unit molperLmin = mole / (litre * 60 second);
  unit molpermin = 1 / (60 second);
  unit molperL = mole / litre;
  unit mol = mole;
  unit Dimension_less = (0 dimensionless)^0;
  unit items = item;
  unit itemspermol = item / mole;
end
