// SBML level 3 version 1

model main()
  // model units - substance: mole, time: second, extent: mole

  // Compartments:
  compartment c1 = 1 litre;

  // Species:
  species PX in c1 = 10/c1;
  species PY in c1 = 10/c1;
  species PZ in c1 = 20/c1;
  species X in c1 = 20/c1;
  species Y in c1 = 40/c1;
  species Z in c1 = 20/c1;

  // Parameters:
  beta has per_second;
  alpha0 has per_second;
  alpha has per_second;
  eff = 20 per_second;
  n = 2 per_second;
  KM = 20 per_second;
  tau_mRNA = 1 per_second;
  tau_prot = 5 per_second;
  t_ave has per_second;
  kd_mRNA has per_second;
  kd_prot has per_second;
  k_tl has per_second;
  a_tr has per_second;
  ps_a = 0.25 per_second;
  ps_0 = 0.0005 per_second;
  a0_tr has per_second;

  // Assignment rules:
  beta := tau_mRNA/tau_prot;
  alpha0 := a0_tr*eff*tau_prot/(ln(2)*KM);
  a0_tr := ps_0*60;
  alpha := a_tr*eff*tau_prot/(ln(2)*KM);
  a_tr := (ps_a - ps_0)*60;
  t_ave := tau_mRNA/ln(2);
  kd_mRNA := ln(2)/tau_mRNA;
  kd_prot := ln(2)/tau_prot;
  k_tl := eff/t_ave;

  // Rate rules:
  PX' = k_tl*X - kd_prot*PX;
  PY' = k_tl*Y - kd_prot*PY;
  PZ' = k_tl*Z - kd_prot*PZ;
  X' = a0_tr + a_tr*KM^n/(KM^n + PZ^n) - kd_mRNA*X;
  Y' = a0_tr + a_tr*KM^n/(KM^n + PX^n) - kd_mRNA*Y;
  Z' = a0_tr + a_tr*KM^n/(KM^n + PY^n) - kd_mRNA*Z;

  // Unit definitions:
  unit per_second = 1 / second;
  unit per_min = 1 / (60 second);
  unit minute = 60 second;
  unit seconds = second;
  unit molperLmin = mole / (litre * 60 second);
  unit molpermin = 1 / (60 second);
  unit molperL = mole / litre;
  unit mol = mole;
  unit Dimension_less = dimensionless;
  unit items = item;
  unit itemspermol = item / mole;
end
